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/batch
! ANSYS input file written by Workbench version 19.0 RELEASE
! File used for geometry attach: D:\Facultate\Dat bottle\sticla simplificat_files\dp0\Geom\DM\Geom.agdb
/title,sticla simplificat--Static Structural (B5)
/com,--- Data in consistent NMM units. See Solving Units in the help system for more information.
/units,MPA
/prep7
! Turn off shape checking because checks already performed inside WB mesher.
! See help system for more information.
SHPP,OFF,,NOWARN
etcon,set             ! allow ANSYS to choose best KEYOP's for 180x elements
/com,*********** Nodes for the whole assembly ***********
nblock,3,,17777
(1i9,3e20.9e3)
        1   -2.300000000E+001    1.760000000E+002    0.000000000E+000
        2    2.300000000E+001    1.760000000E+002    0.000000000E+000
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-1
/com,*********** Nodes for all Remote Points ***********
nblock,3
(1i9,3e20.9e3)
   211302    0.000000000E+000    1.000000000E+002    0.000000000E+000
-1
/com,*********** Elements for Body 1 "colapsable bottle" ***********
et,1,187
eblock,19,solid,,571
(19i9)
        1        1        1        1        0        0        0        0       10        0       78      390     3700      842     3679     5690     7515     5685     5688
    14774     7514
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-1
et,2,186
keyo,2,2,1          ! set full integration on SOLID186
eblock,19,solid,,2837
(19i9)
        1        2        1        1        0        0        0        0       20        0      649     4205     4206     4221     4222     4353     4352     4337     4336
    15788    15792    15828    15789    16079    16058    16055    16056    15790    15793    15829    15831
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-1
/com,*********** Elements for Body 3 "inner lid" ***********
/com,*********** Send Body as a Rigid Body ***********
et,3,21
keyo,3,2,1             ! Moments of inertia in nodal coordinates
keyo,3,3,0         ! 3D Mass With Rotary Intertia
r,3,2.87553117175739e-007,2.87553117175739e-007,2.87553117175739e-007,9.11975752281109e-005,1.55937034537079e-004,9.11975752281151e-005
local,11,0,4.86435600863186e-016,188.295345072864,-7.45717088579099e-016,-0.,0.,0.
nrot,265
csys,0
mat,3
real,3
type,3
en,77,265
/com,*********** Send User Defined Coordinate System(s) ***********
local,12,1,0.,0.,0.,-90.,0.,-90.
csys,0
toffst,273.15,  ! Temperature offset from absolute zero
/com,*********** Set Reference Temperature ***********
tref,22.
/com,*********** Send Materials ***********

TB,HYPE,1,1,1,NEO
TBDATA,1,0.95,0.0035

MP,DENS,3,7.85e-09,	! tonne mm^-3
MP,ALPX,3,1.2e-05,	! C^-1
MP,C,3,434000000,	! mm^2 s^-2 C^-1
MP,KXX,3,60.5,	! tonne mm s^-3 C^-1
MP,RSVX,3,0.00017,	! ohm mm
MP,EX,3,200000,	! tonne s^-2 mm^-1
MP,NUXY,3,0.3,
MP,MURX,3,10000,

!************************* Model Summary ********************
!colapsable bottle,	Cauciuc,	matid,	1
!inner lid,	Structural Steel,	matid,	3
!************************* End Model Summary ********************
/com,*********** Create Contact "Frictional - Bot_int To Lid_ext" ***********
! ********* Create Contact to Connect To Rigid Body Mass Node ***********
*set,tid,4
*set,cid,4
et,tid,170
keyo,tid,2,1           ! Set MPC target element and not fix pilot
keyo,tid,4,0           ! Create CE's for all DOFs
type,tid
mat ,cid
real,cid
tshape,pilo
en,49511,265
tshape
! ********* End of Create Contact to Connect To Rigid Body Mass Node ***********
! ******--- Create Insulation Layer on Rigid Body for Surface BC's ---********
eblock,10,,,76
(15i9)
    49512        4        4        4        0       85       84       64       63      256      223      220      221
    49513        4        4        4        0       63       62       86       85      218      219      257      221
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-1
! ******--- End Create Insulation Layer on Rigid Body for Surface BC's ---********
*set,tid,6
*set,cid,5
r,tid
r,cid
et,tid,170
et,cid,174
eblock,10,,,1842
(15i9)
    49588        5        5        5        0     1719     2600     1297     1303    10113     9067     9066     9082
    49589        5        5        5        0     1740     1719     1303     1305    10111     9082     9080     9087
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-1
eblock,10,,,76
(15i9)
    51430        6        5        6        0       84       85       63       64      256      221      220      223
    51431        6        5        6        0       62       63       85       86      218      221      257      219
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-1
! ******--- Create Pilot Element For Rigid Targets ---********
mat,5
real,5
type,6
tshape,pilo
en,51506,265
tshape
! ******--- End Create Pilot Element For Rigid Targets ---********
keyo,tid,2,1               ! Don't fix the pilot node since scoped to rigid body
keyo,cid,10,0              ! adjust contact stiffness each NR iteration (from Program Controlled setting)
keyo,cid,12,0              ! standard contact
mp,mu,cid,0.2        ! unitless
keyo,cid,2,0               ! augmented Lagrange (from Program Controlled setting)
keyo,cid,4,0               ! on Gauss point
keyo,cid,9,2               ! use real geometry with ramped effects
keyo,cid,7,0               ! No Prediction
rmod,cid,3,1.     ! FKN
rmod,cid,5,0.          ! ICONT
rmod,cid,6,0.        ! PINB
rmod,cid,10,0.        ! CNOF
rmod,cid,12,0.        ! FKT
rmod,cid,36,75         ! WB DSID
mp,ex,cid,7.88860905221012e-031        ! EX of underlying rigid body
/com,*********** Create Contact "Frictional - Bot_int To Bot_int" ***********
*set,tid,8
*set,cid,7
r,tid
r,cid
et,tid,170
et,cid,174
eblock,10,,,1842
(15i9)
    51507        7        7        7        0     1719     2600     1297     1303    10113     9067     9066     9082
    51508        7        7        7        0     1740     1719     1303     1305    10111     9082     9080     9087
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-1
eblock,10,,,1842
(15i9)
    53349        8        7        8        0     1719     2600     1297     1303    10113     9067     9066     9082
    53350        8        7        8        0     1740     1719     1303     1305    10111     9082     9080     9087
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-1
keyo,cid,8,2               ! auto create asymmetric contact (from Program Controlled setting)
keyo,cid,10,0              ! adjust contact stiffness each NR iteration (from Program Controlled setting)
keyo,cid,12,0              ! standard contact
mp,mu,cid,0.2      ! unitless
keyo,cid,2,0               ! augmented Lagrange (from Program Controlled setting)
keyo,cid,4,3               ! on nodal point - normal to target surface (projection-based method)
keyo,cid,9,0               ! use real geometry with stepped effects
keyo,cid,7,0               ! No Prediction
rmod,cid,3,1. ! FKN
rmod,cid,5,0.          ! ICONT
rmod,cid,6,0.        ! PINB
rmod,cid,10,0.        ! CNOF
rmod,cid,12,0.        ! FKT
rmod,cid,36,87         ! WB DSID
/com,*********** Create Contact "Frictional - NamedSel6 To NamedSel6" ***********
*set,tid,10
*set,cid,9
r,tid
r,cid
et,tid,170
et,cid,174
eblock,10,,,1898
(15i9)
    55191        9        9        9        0     2144     4260     1528     1536    11370     9595     9594     9614
    55192        9        9        9        0     2169     2144     1536     1537    11369     9614     9613     9617
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-1
eblock,10,,,1898
(15i9)
    57089       10        9       10        0     2144     4260     1528     1536    11370     9595     9594     9614
    57090       10        9       10        0     2169     2144     1536     1537    11369     9614     9613     9617
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-1
keyo,cid,8,2               ! auto create asymmetric contact (from Program Controlled setting)
keyo,cid,10,0              ! adjust contact stiffness each NR iteration (from Program Controlled setting)
keyo,cid,12,0              ! standard contact
mp,mu,cid,0.2  ! unitless
keyo,cid,2,0               ! augmented Lagrange (from Program Controlled setting)
keyo,cid,4,3               ! on nodal point - normal to target surface (projection-based method)
keyo,cid,9,0               ! use real geometry with stepped effects
keyo,cid,7,0               ! No Prediction
rmod,cid,3,1. ! FKN
rmod,cid,5,0.          ! ICONT
rmod,cid,6,0.        ! PINB
rmod,cid,10,0.        ! CNOF
rmod,cid,12,0.        ! FKT
rmod,cid,36,90         ! WB DSID
nsel,all
esel,all
/com,*********** Send Named Selection as Node Component ***********
CMBLOCK,BOT_INT ,NODE,     5734
(8i10)
       496       497       498       499       500       501       502       503
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/com,*********** Send Named Selection as Node Component ***********
CMBLOCK,LID_EXT ,NODE,      264
(8i10)
         1         2         3         4         5         6         7         8
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
/com,*********** Send Named Selection as Node Component ***********
CMBLOCK,NAMEDSEL6,NODE,     5887
(8i10)
       445       446       447       448       449       450       451       452
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/com,******* Constant Zero Displacement X *******
CMBLOCK,_DISPZEROUX,NODE,      637
(8i10)
      1528      1531      1534      1536      1537      1538      1541      1542
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cmsel,s,_DISPZEROUX
d,all,ux,0
nsel,all
/com,******* Constant Zero Displacement Y *******
CMBLOCK,_DISPZEROUY,NODE,      930
(8i10)
       490       491       493       495       533       534       536       538
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cmsel,s,_DISPZEROUY
d,all,uy,0
nsel,all
/com,******* Constant Zero Displacement Z *******
CMBLOCK,_DISPZEROUZ,NODE,      264
(8i10)
      1547      1549      1551      1553      1555      1557      1559      1562
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
cmsel,s,_DISPZEROUZ
d,all,uz,0
nsel,all
/com,*********** Node Rotations ***********
nmod,490,,,,-90.,89.9999999999824,-90.
nmod,491,,,,-180.,90.,0.
nmod,493,,,,0.,-90.,0.
nmod,495,,,,0.,-90.,0.
nmod,533,,,,0.,-90.,0.
nmod,534,,,,0.,-90.,0.
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nmod,16161,,,,-90.,-79.7080758123765,-90.
/com,*********** Create Remote Point "Remote Point" ***********
*set,_npilot,211302
_npilot102=_npilot
mat,4
real,4
type,4
en,58987,265,211302
/com,*********** Construct Remote Displacement ***********

*DIM,_loadvari100ux,TABLE,2,1,1,TIME,
! Time values
_loadvari100ux(1,0,1) = 0.
_loadvari100ux(2,0,1) = 1.
! Load values
_loadvari100ux(1,1,1) = 0.
_loadvari100ux(2,1,1) = 0.


*DIM,_loadvari100uy,TABLE,4,1,1,TIME,
! Time values
_loadvari100uy(1,0,1) = 0.
_loadvari100uy(2,0,1) = 1.
_loadvari100uy(3,0,1) = 2.
_loadvari100uy(4,0,1) = 3.
! Load values
_loadvari100uy(1,1,1) = 0.
_loadvari100uy(2,1,1) = 0.
_loadvari100uy(3,1,1) = -10.
_loadvari100uy(4,1,1) = -10.


*DIM,_loadvari100uz,TABLE,2,1,1,TIME,
! Time values
_loadvari100uz(1,0,1) = 0.
_loadvari100uz(2,0,1) = 1.
! Load values
_loadvari100uz(1,1,1) = 0.
_loadvari100uz(2,1,1) = 0.


*DIM,_loadvari100rotx,TABLE,2,1,1,TIME,
! Time values
_loadvari100rotx(1,0,1) = 0.
_loadvari100rotx(2,0,1) = 1.
! Load values
_loadvari100rotx(1,1,1) = 0.
_loadvari100rotx(2,1,1) = 0.


*DIM,_loadvari100roty,TABLE,2,1,1,TIME,
! Time values
_loadvari100roty(1,0,1) = 0.
_loadvari100roty(2,0,1) = 1.
! Load values
_loadvari100roty(1,1,1) = 0.
_loadvari100roty(2,1,1) = 0.


*DIM,_loadvari100rotz,TABLE,4,1,1,TIME,
! Time values
_loadvari100rotz(1,0,1) = 0.
_loadvari100rotz(2,0,1) = 1.
_loadvari100rotz(3,0,1) = 2.
_loadvari100rotz(4,0,1) = 3.
! Load values
_loadvari100rotz(1,1,1) = 0.
_loadvari100rotz(2,1,1) = 0.
_loadvari100rotz(3,1,1) = 0.
_loadvari100rotz(4,1,1) = 0.55


/COM,*** Create a component for all remote displacements ***
CMBLOCK,REMOTEDISPALL,NODE,        1
(8i10)
    211302

et,11,14             ! spring element type
/com,*********** Construct Weak Springs, Prototype 1 ***********
*set,_delta,10.5523691703288
type,11
mat,12
real,12
r,12,1.57429521827125e-039
nsel,all
*get,_nspr,ndmx
_nspr=_nspr+1
esel,s,mat,,1
nsle,s,active
*get,_minx,node,0,mnloc,x
*get,_miny,node,0,mnloc,y
*get,_minz,node,0,mnloc,z
*get,_maxx,node,0,mxloc,x
*get,_maxy,node,0,mxloc,y
*get,_maxz,node,0,mxloc,z
*dim,_ntets,arra,8
_ntets(1) = NODE(_minx,_miny,_minz)
_ntets(2) = NODE(_minx,_miny,_maxz)
_ntets(3) = NODE(_minx,_maxy,_minz)
_ntets(4) = NODE(_minx,_maxy,_maxz)
_ntets(5) = NODE(_maxx,_miny,_minz)
_ntets(6) = NODE(_maxx,_miny,_maxz)
_ntets(7) = NODE(_maxx,_maxy,_minz)
_ntets(8) = NODE(_maxx,_maxy,_maxz)
*do,_i,1,8
  n,_nspr,nx(_ntets(_i))+_delta,ny(_ntets(_i)),nz(_ntets(_i))
  e,_ntets(_i),_nspr
  d,_nspr,all
  _nspr=_nspr+1
  n,_nspr,nx(_ntets(_i)),ny(_ntets(_i))+_delta,nz(_ntets(_i))
  e,_ntets(_i),_nspr
  d,_nspr,all
  _nspr=_nspr+1
  n,_nspr,nx(_ntets(_i)),ny(_ntets(_i)),nz(_ntets(_i))+_delta
  e,_ntets(_i),_nspr
  d,_nspr,all
  _nspr=_nspr+1
*enddo
*set,_ntets
nsel,all
esel,all
/com,*********** Construct Weak Springs, Prototype 2 ***********
*set,_delta,3.96011370178653
type,11
mat,13
real,13
r,13,1.58404548071461e-003
nsel,all
*get,_nspr,ndmx
_nspr=_nspr+1
esel,s,mat,,3
nsle,s,active
*get,_minx,node,0,mnloc,x
*get,_miny,node,0,mnloc,y
*get,_minz,node,0,mnloc,z
*get,_maxx,node,0,mxloc,x
*get,_maxy,node,0,mxloc,y
*get,_maxz,node,0,mxloc,z
*dim,_ntets,arra,8
_ntets(1) = NODE(_minx,_miny,_minz)
_ntets(2) = NODE(_minx,_miny,_maxz)
_ntets(3) = NODE(_minx,_maxy,_minz)
_ntets(4) = NODE(_minx,_maxy,_maxz)
_ntets(5) = NODE(_maxx,_miny,_minz)
_ntets(6) = NODE(_maxx,_miny,_maxz)
_ntets(7) = NODE(_maxx,_maxy,_minz)
_ntets(8) = NODE(_maxx,_maxy,_maxz)
*do,_i,1,8
  n,_nspr,nx(_ntets(_i))+_delta,ny(_ntets(_i)),nz(_ntets(_i))
  e,_ntets(_i),_nspr
  d,_nspr,all
  _nspr=_nspr+1
  n,_nspr,nx(_ntets(_i)),ny(_ntets(_i))+_delta,nz(_ntets(_i))
  e,_ntets(_i),_nspr
  d,_nspr,all
  _nspr=_nspr+1
  n,_nspr,nx(_ntets(_i)),ny(_ntets(_i)),nz(_ntets(_i))+_delta
  e,_ntets(_i),_nspr
  d,_nspr,all
  _nspr=_nspr+1
*enddo
*set,_ntets
nsel,all
esel,all
fini
/com,****************************************************************************
/com,*************************    SOLUTION       ********************************
/com,****************************************************************************
/solu
antype,0                   ! static analysis
nlgeom,on                  ! Turn on Large Deformation Effects
eqsl,sparse,,,,,1
cntr,print,1               ! print out contact info and also make no initial contact an error
dmpoption,emat,no             ! Don't combine emat file for DANSYS
dmpoption,esav,no             ! Don't combine esav file for DANSYS
nldiag,cont,iter           ! print out contact info each equilibrium iteration
rescontrol,define,last,last,,dele	   ! Program Controlled
/com,****************************************************
/com,******************* SOLVE FOR LS 1 OF 3 ****************
d,211302,ux,%_loadvari100ux%
d,211302,uy,%_loadvari100uy%
d,211302,uz,%_loadvari100uz%
d,211302,rotx,%_loadvari100rotx%
d,211302,roty,%_loadvari100roty%
d,211302,rotz,%_loadvari100rotz%
autots,on                   ! User turned on automatic time stepping
nsub,5,1000,5,OFF
time,1.
outres,erase
outres,all,none
outres,nsol,all
outres,rsol,all
outres,strs,all
outres,epel,all
outres,eppl,all
esel,s,mat,,3
cm,_elmisc,elem
esel,all
outres,misc,all,_elmisc
stabilize,off                   ! Stabilization turned OFF by user
! *********** WB SOLVE COMMAND ***********
! check interactive state
*get,ANSINTER_,active,,int
*if,ANSINTER_,ne,0,then
/eof
*endif
solve
/com *************** Write FE CONNECTORS *********
CEWRITE,file,ce,,INTE
/com,****************************************************
/com,*************** FINISHED SOLVE FOR LS 1 *************
/com,****************************************************
/com,******************* SOLVE FOR LS 2 OF 3 ****************
autots,on                   ! User turned on automatic time stepping
nsub,10,1000,10,OFF
time,2.
outres,erase
outres,all,none
outres,nsol,all
outres,rsol,all
outres,strs,all
outres,epel,all
outres,eppl,all
outres,misc,all,_elmisc
stabilize,off                   ! Stabilization turned OFF by user
solve
/com,****************************************************
/com,*************** FINISHED SOLVE FOR LS 2 *************
/com,****************************************************
/com,******************* SOLVE FOR LS 3 OF 3 ****************
autots,on                   ! User turned on automatic time stepping
nsub,20,1000,20,OFF
time,3.
outres,erase
outres,all,none
outres,nsol,all
outres,rsol,all
outres,strs,all
outres,epel,all
outres,eppl,all
outres,misc,all,_elmisc
stabilize,off                   ! Stabilization turned OFF by user
solve
/com,****************************************************
/com,*************** FINISHED SOLVE FOR LS 3 *************
/post1
fini
